Wed Oct 15 14:37:36 EDT 2025
$PROBLEM    INPUT with DROP and overlap with data file
$INPUT      ROW ID NOMTIME TIME EVID CMT AMT DROP=DV FLAG STUDY BLQ
            CYCLE DOSE=DV PART PROFDAY PROFTIME WEIGHTB eff0
$DATA      xgxr3.csv IGNORE=@ IGNORE=(FLAG.NE.0)
$SUBROUTINE ADVAN4 TRANS4
$PK
TVKA=THETA(1)
TVV2=THETA(2)
TVCL=THETA(3)
TVV3=THETA(4)
TVQ=THETA(5)

KA=TVKA*EXP(ETA(1))
V2=TVV2*EXP(ETA(2))
CL=TVCL*EXP(ETA(3))
V3=TVV3*EXP(ETA(4))
Q=TVQ*EXP(ETA(5))

$ERROR
  IPRED=F
  IRES=DV-IPRED

  IF (IPRED.GT.1) THEN
    W = SQRT(IPRED**2*SIGMA(1,1)**2 + SIGMA(2,2)**2)
  ELSE
    W=1
  ENDIF

  IWRES=IRES/W
  Y=F+F*ERR(1)+ERR(2)

;-----------------------INITIAL ESTIMATES---------------------------------
$THETA  (0,0.9) ; 1 - POPKA
$THETA  (0,4.2) ; 2 - POPCL
$THETA  (0,3.6) ; 3 - POPV2
$THETA  (0,5.81) ; 4 - POPV3
$THETA  (0,3.44) ; 5 - POPQ
$OMEGA  0.1
$OMEGA  0.1
$OMEGA  0.1
$OMEGA  0  FIX
$OMEGA  0  FIX
$SIGMA  .2
$SIGMA  .2
$ESTIMATION METHOD=1 POSTHOC INTER MAXEVAL=9999 NSIG=2 SIGL=9 PRINT=10
            NOABORT
$TABLE      ROW TVKA TVV2 TVCL TVV3 TVQ KA V2 CL V3 Q PRED IPRED
            NOPRINT FILE=xgxr059_res.txt

NM-TRAN MESSAGES
 WARNINGS AND ERRORS (IF ANY) FOR PROBLEM    1
 (WARNING  2) NM-TRAN INFERS THAT THE DATA ARE POPULATION.
 (WARNING  23) $PK DOES NOT DEFINE A SCALE PARAMETER FOR THE CENTRAL
 COMPARTMENT.  WITH THIS TRANS, IT MAY NOT BE POSSIBLE TO SEPARATELY
 OBTAIN ESTIMATES OF PARAMETERS AFFECTING CLEARANCE AND VOLUME.
 (DATA WARNING   5) RECORD         1, DATA ITEM  12, CONTENTS: 3
 THE DV DATA ITEM IS POSITIVE, BUT THE MDV DATA ITEM IS 1
 (DATA WARNING   5) RECORD         2, DATA ITEM  12, CONTENTS: 3
 THE DV DATA ITEM IS POSITIVE, BUT THE MDV DATA ITEM IS 1
 (WARNING  79) SIGMA IS USED ON THE RIGHT. WITH A SUBSEQUENT RUN, IF AN
 INITIAL ESTIMATE OF A DIAGONAL BLOCK OF SIGMA IS TO BE COMPUTED BY
 NONMEM, THAT BLOCK WILL BE SET TO AN IDENTITY MATRIX DURING THAT
 COMPUTATION. THIS COULD LEAD TO AN ARITHMETIC EXCEPTION.*
 * THE MAXIMUM NUMBER OF WARNINGS OF ONE OR MORE TYPES WAS REACHED.
 IT IS POSSIBLE THAT SOME WARNING MESSAGES WERE SUPPRESSED.
 LIM VALUES MAXLIM ASSESSED BY NMTRAN: 1,2,3,4,5,6,7,8,10,11,13,15,16
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
1NONLINEAR MIXED EFFECTS MODEL PROGRAM (NONMEM) VERSION 7.5.0
 ORIGINALLY DEVELOPED BY STUART BEAL, LEWIS SHEINER, AND ALISON BOECKMANN
 CURRENT DEVELOPERS ARE ROBERT BAUER, ICON DEVELOPMENT SOLUTIONS,
 AND ALISON BOECKMANN. IMPLEMENTATION, EFFICIENCY, AND STANDARDIZATION
 PERFORMED BY NOUS INFOSYSTEMS.
 PROBLEM NO.:         1
 INPUT with DROP and overlap with data file
 TOT. NO. OF OBS RECS:      755
 TOT. NO. OF INDIVIDUALS:      150
 TWO COMPARTMENT MODEL WITH FIRST-ORDER ABSORPTION (ADVAN4)
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 #TBLN:      1
 #METH: First Order Conditional Estimation with Interaction
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
 #TERM:
0MINIMIZATION SUCCESSFUL
 NO. OF FUNCTION EVALUATIONS USED:      393
 NO. OF SIG. DIGITS IN FINAL EST.:  3.5
0PARAMETER ESTIMATE IS NEAR ITS BOUNDARY
 THIS MUST BE ADDRESSED BEFORE THE COVARIANCE STEP CAN BE IMPLEMENTED

 ETABAR IS THE ARITHMETIC MEAN OF THE ETA-ESTIMATES,
 AND THE P-VALUE IS GIVEN FOR THE NULL HYPOTHESIS THAT THE TRUE MEAN IS 0.

 ETABAR:        -3.0403E-08 -3.3007E-11  2.9622E-05  0.0000E+00  0.0000E+00
 SE:             2.5886E-09  2.1293E-12  2.4168E-06  0.0000E+00  0.0000E+00
 N:                     131         131         131         131         131

 P VAL.:         7.7195E-32  3.5633E-54  1.5989E-34  1.0000E+00  1.0000E+00

 ETASHRINKSD(%)  1.0000E+02  1.0000E+02  1.0000E+02  0.0000E+00  0.0000E+00
 ETASHRINKVR(%)  1.0000E+02  1.0000E+02  1.0000E+02  0.0000E+00  0.0000E+00
 EBVSHRINKSD(%)  1.0000E+02  1.0000E+02  9.9918E+01  0.0000E+00  0.0000E+00
 EBVSHRINKVR(%)  1.0000E+02  1.0000E+02  1.0000E+02  0.0000E+00  0.0000E+00
 RELATIVEINF(%)  1.0000E-10  0.0000E+00  6.6869E-06  0.0000E+00  0.0000E+00
 EPSSHRINKSD(%)  9.9982E+01  9.9982E+01
 EPSSHRINKVR(%)  1.0000E+02  1.0000E+02


 TOTAL DATA POINTS NORMALLY DISTRIBUTED (N):          755
 N*LOG(2PI) CONSTANT TO OBJECTIVE FUNCTION:    1387.5971851390557
 OBJECTIVE FUNCTION VALUE WITHOUT CONSTANT:   -1583.9828269228531
 OBJECTIVE FUNCTION VALUE WITH CONSTANT:      -196.38564178379738
 REPORTED OBJECTIVE FUNCTION DOES NOT CONTAIN CONSTANT

 TOTAL EFFECTIVE ETAS (NIND*NETA):                           393


 #TERE:
 Elapsed estimation  time in seconds:     3.39
 Elapsed postprocess time in seconds:     0.02

 ********************               FIRST ORDER CONDITIONAL ESTIMATION WITH INTERACTION              ********************
 #OBJT:**************                       MINIMUM VALUE OF OBJECTIVE FUNCTION                      ********************
 #OBJV:********************************************    -1583.983       **************************************************

 ********************               FIRST ORDER CONDITIONAL ESTIMATION WITH INTERACTION              ********************
 ********************                             FINAL PARAMETER ESTIMATE                           ********************

 THETA - VECTOR OF FIXED EFFECTS PARAMETERS   *********
         TH 1      TH 2      TH 3      TH 4      TH 5
         6.6E+153  1.16E+06  3.60E-02  1.07E+00  2.84E-01

 OMEGA - COV MATRIX FOR RANDOM EFFECTS - ETAS  ********
         ETA1      ETA2      ETA3      ETA4      ETA5
 ETA1
+        3.97E+07
 ETA2
+        0.00E+00  1.00E-05
 ETA3
+        0.00E+00  0.00E+00  3.42E+01
 ETA4
+        0.00E+00  0.00E+00  0.00E+00  0.00E+00
 ETA5
+        0.00E+00  0.00E+00  0.00E+00  0.00E+00  0.00E+00

 SIGMA - COV MATRIX FOR RANDOM EFFECTS - EPSILONS  ****
         EPS1      EPS2
 EPS1
+        2.00E-05
 EPS2
+        0.00E+00  2.00E-05

 OMEGA - CORR MATRIX FOR RANDOM EFFECTS - ETAS  *******
         ETA1      ETA2      ETA3      ETA4      ETA5
 ETA1
+        6.30E+03
 ETA2
+        0.00E+00  3.16E-03
 ETA3
+        0.00E+00  0.00E+00  5.85E+00
 ETA4
+        0.00E+00  0.00E+00  0.00E+00  0.00E+00
 ETA5
+        0.00E+00  0.00E+00  0.00E+00  0.00E+00  0.00E+00

 SIGMA - CORR MATRIX FOR RANDOM EFFECTS - EPSILONS  ***
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 Elapsed finaloutput time in seconds:     0.07
 #CPUT: Total CPU Time in Seconds,        3.640
